** Analytical snap-back benchmark for dissipation path following.
** Generated by mkbar.py - do not edit by hand.
**
**   E=200000 nu=0 sigma_y=400 eps0=0.0005 u_f=0.01 h=1 slices=20 weak=10
**   snap-back indicator r = L_e*sigma_y/(E*u_f) = 3.8038  (>1 required)
**   exact peak      end displacement u = 0.050040 at sigma = 400
**   exact failure   end displacement u = 0.020000 at sigma = 0
**   the end displacement must DECREASE by 0.030040 while the bar fails
*NODE, NSET=NALL
1, 0, 0, 0
2, 0, 0, 1
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*ELEMENT, TYPE=C3D4, ELSET=EBULK
1, 1, 5, 7, 8
2, 1, 7, 3, 8
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*ELEMENT, TYPE=C3D4, ELSET=EWEAK
61, 41, 45, 47, 48
62, 41, 47, 43, 48
63, 41, 43, 44, 48
64, 41, 44, 42, 48
65, 41, 42, 46, 48
66, 41, 46, 45, 48
*NSET, NSET=NLEFT
1, 2, 3, 4
*NSET, NSET=NRIGHT
81, 82, 83, 84
*NSET, NSET=NPIN
1
*NSET, NSET=NROLL
3
** Both materials share one elastic-plastic law, so the WHOLE bar
** yields together and contracts laterally without mismatch.  That
** keeps the stress field uniformly uniaxial, which linear tetrahedra
** represent exactly, so the 1-D reference above is the FE answer and
** not just an estimate.  A single plastic slice between elastic
** blocks would instead be laterally constrained and would carry an
** axial stress well above sigma_y.
** The slices differ ONLY in that the weak one can damage.
*MATERIAL, NAME=BULK
*ELASTIC
200000, 0
*PLASTIC
400, 0.
440, 0.05
*MATERIAL, NAME=WEAK
*ELASTIC
200000, 0
*PLASTIC
400, 0.
440, 0.05
*DAMAGE INITIATION, CRITERION=RICETRACEY, EVOLUTION=DISPLACEMENT
0.0005, 1.0, 0.01, 0.
*SOLID SECTION, ELSET=EBULK, MATERIAL=BULK
*SOLID SECTION, ELSET=EWEAK, MATERIAL=WEAK
*BOUNDARY
NLEFT, 1, 1, 0.
NPIN, 2, 3, 0.
NROLL, 3, 3, 0.
*STEP, INC=2000, NLGEOM
*STATIC
0.01, 1.0, 1e-09, 0.02
*BOUNDARY
NRIGHT, 1, 1, 0.055
*NODE PRINT, NSET=NRIGHT, TOTALS=ONLY
RF
*NODE PRINT, NSET=NRIGHT
U
*EL PRINT, ELSET=EWEAK
SDV
*NODE FILE
U, RF
*EL FILE
S, PEEQ
*END STEP
